Q := ω_0/ω_z
1/(s*C)*(r + s*L)/(r + s*L + 1/(s*C)) == (r + s*L)/(1 + s*r*C + s^2*L*C) == K*(1 + s/ω_z)/(1 + s/(ω_0*Q) + s^2/ω_0^2)
K == r
Q == sqrt(L/C)*1/r == ω_0/ω_z
ω_0 == 1/sqrt(L*C)
f_mag(ω) := sqrt(K*(1 + ω^2/ω_z^2)/((1 - ω^2/ω_0^2)^2 + (ω/(ω_0*Q))^2))  # disabled
ω_z == r/L == ω_0/Q
f_mag(ω) := 10*log(K) + 10*log(1 + ω^2/ω_z^2) - 10*log((1 - ω^2/ω_0^2)^2 + (ω/(ω_0*Q))^2)
grad(ω) := [d/dK(f_mag(ω)); d/dω_z(f_mag(ω)); d/dω_0(f_mag(ω))]
grad(ω) simplify → [
    10/(K*ln(10));
    -20*ω^2*(ω^4 - 2*ω^2*ω_0^2 + 2*ω^2*ω_z^2 + ω_0^4 + ω_z^4)/(ω_z*ln(10)*(ω^2 + ω_z^2)*(ω^4 - 2*ω^2*ω_0^2 + ω^2*ω_z^2 + ω_0^4));
    40*ω^2*(ω^2 - ω_0^2 + ω_z^2)/(ln(10)*ω^4*ω_0 - 2*ln(10)*ω^2*ω_0^3 + ln(10)*ω^2*ω_0*ω_z^2 + ln(10)*ω_0^5)
]
grad_1(ω) := 20/ln(10)*[
    1/(2*K);
    -ω^2/(ω_z*(ω^2 + ω_z^2));
    2*Q^2/ω_0*ω^2*(ω^2 + ω_0^2*((1 - 2*Q^2)/(2*Q^2)))/(Q^2*(ω^2 - ω_0^2)^2 + ω^2*ω_0^2)
]
grad(ω)[0]/grad_1(ω)[0] simplify → 1
grad(ω)[1]/grad_1(ω)[1] simplify → (ω^2*ω_z^2 + ω_z^4)/(ω^4 - 2*ω^2*ω_0^2 + ω^2*ω_z^2 + ω_0^4) + 1
grad(ω)[2]/grad_1(ω)[2] simplify → ω_z^2/(2*ω^2 - 2*ω_0^2 + ω_z^2) + 1
f_mag(ω) := sqrt((r^2 + (ω*L)^2)/((1 - ω^2*L*C)^2 + (ω*r*C)^2))
f_mag(ω) := 10*log((r^2 + (ω*L)^2)/((1 - ω^2*L*C)^2 + (ω*r*C)^2))
f_mag(ω) := 10*log(r^2 + (ω*L)^2) - 10*log((1 - ω^2*L*C)^2 + (ω*r*C)^2)  # disabled
grad(ω) := [d/dL(f_mag(ω)); d/dr(f_mag(ω)); d/dC(f_mag(ω))]
grad(ω) simplify → [
    (20*L*ω^2 - 20*C*L^2*ω^4 + 20*C*ω^2*r^2)/(ln(10)*(L^2*ω^2 + r^2)*(C^2*L^2*ω^4 + C^2*ω^2*r^2 - 2*C*L*ω^2 + 1));
    (20*r - 40*C*L*ω^2*r)/(ln(10)*(L^2*ω^2 + r^2)*(C^2*L^2*ω^4 + C^2*ω^2*r^2 - 2*C*L*ω^2 + 1));
    -20*ω^2*(C*L^2*ω^2 - L + C*r^2)/(ln(10)*(C^2*L^2*ω^4 + C^2*ω^2*r^2 - 2*C*L*ω^2 + 1))
]
grad_1(ω) := 20/ln(10)*1/((1 - C*L*ω^2)^2 + (ω*r*C)^2)*[
    1/(r^2 + (L*ω)^2)*L*ω^2*(1 - C*L*ω^2 + C/L*r^2);
    r/(r^2 + (L*ω)^2)*(1 - 2*C*L*ω^2);
    L*ω^2*(1 - C*L*ω^2 - C/L*r^2)
]
grad_1(ω) := 1/sqrt((r^2 + (ω*L)^2)/((1 - ω^2*L*C)^2 + (ω*r*C)^2))*1/((1 - ω^2*L*C)^2 + (ω*r*C)^2)^2*[ω^2*L*(1 - C*L*ω^2 + C/L*r^2); r*(1 - 2*C*L*ω^2); ω^2*L*(r^2 + (ω*L)^2)*(1 - C*L*ω^2 - C/L*r^2)]  # disabled
grad(ω)[0]/grad_1(ω)[0] simplify → 1
grad(ω)[1]/grad_1(ω)[1] simplify → 1
grad(ω)[2]/grad_1(ω)[2] simplify → 1
K := r
Q := sqrt(L/C)*1/r
ω_0 := 1/sqrt(L*C)
ω_0/Q simplify → r/(sqrt(C*L)*sqrt(L/C))
ω_z := r/L
ω_0^2/Q^2 simplify → r^2/L^2
ω_L := ω_0/Q
R/(s*C)/(R + 1/(s*C))*(r + s*L)/(r + s*L + R/(s*C)/(R + 1/(s*C))) simplify → R*(r + L*s)/(R + r + L*s + C*R*r*s + C*L*R*s^2)
(R*r/(R + r)*(1 + s*L/r)/(1 + s*(r*C + L/R)*R/(R + r) + s^2*L*C*R/(R + r)))/(R/(s*C)*(r + s*L)/(R + 1/(s*C))/(R/(s*C)/(R + 1/(s*C)) + r + s*L)) simplify → 1
